// COMSOL Multiphysics 6.3.0.290 model "浓度梯度update2_无结果_调试2.mph"
// Outline of the model tree

Parameters
  H = 90[mm]  // 截面高
  W = 78[mm]  // 截面宽
  P = 475700[Pa]  // 150°下的大气压
  T = 150[degC]  // 加热温度
  rho_150 = 918[kg/m^3]  // 150°下水密度
  miu_150 = 2.2e-4[Pa*s]  // 150°下水的动力黏度
  sigma_ref = 0.045[N/m]  // 150°下的基准表面张力
  dsigmadc = 5e-5 [N*m^2/mol]  // d(sigma)/dc导数
  c_ref = c0  // 参考浓度
  c0 = 3.36[mol/m^3]  // 初始本体浓度
  D = 5e-9[m^2/s]  // 扩散系数
  k = 3e-7 [m/s]  // 衬底消耗速率
  theta_SiO2 = 50[deg]  // 液与衬底接触角（150°）
  theta_teflon = 100[deg]  // 液与内胆接触角（150°）
  d = 15[mm]  // 衬底边长
  sqrt = 2^0.5  // 根号2
  rho2 = 0.834[kg/m^3]  // 150°下空气密度
  miu2 = 2.48e-5[Pa*s]  // 150°下空气动力黏度
  M = dsigmadc  // 浓度变化引起表面张力变化的强度
  sqrt_3 = 3^0.5  // 根号3
  D_air = 5e-5 [m^2/s]  // 空气域中的扩散系数

Couplings
  intop1: Integration "积分 1" on all domains
  aveop1: Average "平均值 1" on all domains | opname = aveF

Common definitions
  state1: StateVariables "状态变量 1" on domains 1
    state = ccc
    initialValue = c0
    updateExpression = c
    update = onlyInitialization

Geometry
  geom1 "几何 1" (2D, length unit mm)
    r1: Rectangle "矩形 1" | size = {W, H}
    ls1: LineSegment "线段 1" | specify1 = coord; coord1 = {0, H/3}; specify2 = coord; coord2 = {W, H/3}
    pard1: PartitionDomains "分割域 1" | domain = r1(1) domains 1; partitionwith = edges; edge = ls1(1) boundaries 1
    ls2: LineSegment "线段 2"
      specify1 = coord
      coord1 = {0, H/3+d*sqrt_3/4}
      specify2 = coord
      coord2 = {d/2, H/3-d*sqrt_3/4}
    pt1: Point "点 1" | p = {10, 10}
    fin: Finalize "形成联合体"

Materials
  mat1: Common "Water" on domains 1
    def: def "Basic"
      thermalexpansioncoefficient = alpha_p(T)
      bulkviscosity = muB(T)
      dynamicviscosity = miu_150
      ratioofspecificheat = gamma_w(T)
      electricconductivity = 5.5e-6[S/m]
      heatcapacity = Cp(T)
      density = rho_150
      thermalconductivity = k(T)
      soundspeed = cs(T)
      eta: Piecewise
        arg = T
        pieces = 
          {273.15, 413.15, 1.3799566804-0.021224019151*T^1+1.3604562827E-4*T^2-4.6454090319E-7*T^3+8.9042735735E-10*T^4-9.0790692686E-13*T^5+3.8457331488E-16*T^6}
          {413.15, 553.75, 0.00401235783-2.10746715E-5*T^1+3.85772275E-8*T^2-2.39730284E-11*T^3}
        argunit = K
        fununit = Pa*s
      Cp: Piecewise | arg = T; pieces = {273.15, 553.75, 12010.1471-80.4072879*T^1+0.309866854*T^2-5.38186884E-4*T^3+3.62536437E-7*T^4}; argunit = K; fununit = J/(kg*K)
      rho: Piecewise
        arg = T
        smooth = contd1
        pieces = 
          {273.15, 293.15, 6.3092789034e-05*T^3-0.0603676398829*T^2+18.9229382407066*T-950.704055329848}
          {293.15, 373.15, 1.0335053319e-05*T^3-0.0133950656345*T^2+4.96928883266*T+432.257114008512}
        argunit = K
        fununit = kg/m^3
      k: Piecewise | arg = T; pieces = {273.15, 553.75, -0.869083936+0.00894880345*T^1-1.58366345E-5*T^2+7.97543259E-9*T^3}; argunit = K; fununit = W/(m*K)
      cs: Interpolation
        funcnametable = {cs, 1}
        table = {{273, 1403}, {278, 1427}, {283, 1447}, {293, 1481}, {303, 1507}, {313, 1526}, {323, 1541}, {333, 1552}, {343, 1555}, {353, 1555}, {363, 1550}, {373, 1543}}
        interp = piecewisecubic
        fununit = m/s
        argunit = K
      an1: Analytic | funcname = alpha_p; expr = -1/rho(T)*d(rho(T),T); args = T; fununit = 1/K; argunit = K
      an2: Analytic | funcname = gamma_w; expr = 1+(T/Cp(T))*(alpha_p(T)*cs(T))^2; args = T; fununit = 1; argunit = K
      an3: Analytic | funcname = muB; expr = 2.79*eta(T); args = T; fununit = Pa*s; argunit = K
  mat2: Common "Air" on domains 2, 3
    def: def "Basic"
      thermalexpansioncoefficient = alpha_p(pA,T)
      molarmass = 0.02897[kg/mol]
      bulkviscosity = muB(T)
      dynamicviscosity = miu2
      ratioofspecificheat = 1.4
      electricconductivity = 0[S/m]
      heatcapacity = Cp(T)
      density = rho2
      thermalconductivity = k(T)
      soundspeed = cs(T)
      eta: Piecewise | arg = T; pieces = {200.0, 1600.0, -8.38278E-7+8.35717342E-8*T^1-7.69429583E-11*T^2+4.6437266E-14*T^3-1.06585607E-17*T^4}; argunit = K; fununit = Pa*s
      Cp: Piecewise | arg = T; pieces = {200.0, 1600.0, 1047.63657-0.372589265*T^1+9.45304214E-4*T^2-6.02409443E-7*T^3+1.2858961E-10*T^4}; argunit = K; fununit = J/(kg*K)
      rho: Analytic | expr = pA*0.02897/R_const[K*mol/J]/T; args = {pA, T}; dermethod = manual; argders = {{pA, d(pA*0.02897/R_const/T,pA)}, {T, d(pA*0.02897/R_const/T,T)}}; fununit = kg/m^3; argunit = {Pa, K}
      k: Piecewise | arg = T; pieces = {200.0, 1600.0, -0.00227583562+1.15480022E-4*T^1-7.90252856E-8*T^2+4.11702505E-11*T^3-7.43864331E-15*T^4}; argunit = K; fununit = W/(m*K)
      cs: Analytic | expr = sqrt(1.4*R_const[K*mol/J]/0.02897*T); args = T; dermethod = manual; fununit = m/s; argunit = K
      an1: Analytic | funcname = alpha_p; expr = -1/rho(pA,T)*d(rho(pA,T),T); args = {pA, T}; fununit = 1/K; argunit = {Pa, K}
      an2: Analytic "Analytic 2a" | funcname = muB; expr = 0.6*eta(T); args = T; fununit = Pa*s; argunit = K
    NonlinearModel: NonlinearModel
      BA = (def.gamma+1)/2
    idealGas: idealGas
      Rs = R_const/Mn
      heatcapacity = Cp(T)
      ratioofspecificheat = 1.4
      molarmass = 0.02897[kg/mol]
      Cp: Piecewise | arg = T; pieces = {200.0, 1600.0, 1047.63657-0.372589265*T^1+9.45304214E-4*T^2-6.02409443E-7*T^3+1.2858961E-10*T^4}; argunit = K; fununit = J/(kg*K)
  mat3: Common "Silicon [solid,ideally pure]" on boundaries 6, 8
    def: def "基本"
      resistivity = res_solid_ideally_pure_1(T)
      thermalexpansioncoefficient = (alpha_solid_1(T)+(Tempref-293[K])*if(abs(T-Tempref)>1e-3,(alpha_solid_1(T)-alpha_solid_1(Tempref))/(T-Tempref),d(alpha_solid_1(T),T)))/(1+alpha_solid_1(Tempref)*(Tempref-293[K]))
      heatcapacity = C_solid_1(T)
      electricconductivity = sigma_solid_ideally_pure_1(T)
      HC = HC_solid_1(T)
      VP = VP_solid_1(T)
      density = rho_solid_1(T)
      res_solid_ideally_pure_1: Piecewise
        arg = T
        pieces = 
          {79.0, 364.0, exp(2.41553243E-14*T^6 - 4.53060537E-11*T^5 + 3.33138089E-08*T^4 - 1.25961454E-05*T^3 + 2.65814575E-03*T^2 - 3.13800137E-01*T + 1.66255491E+01)}
          {364.0, 584.0, exp(-7.48706678E-12*T^5 + 1.66560544E-08*T^4 - 1.49026159E-05*T^3 + 6.73181905E-03*T^2 - 1.54364035E+00*T + 1.42728132E+02)}
          {584.0, 909.0, exp(2.60884402E-10*T^4 - 7.15630353E-07*T^3 + 7.39495950E-04*T^2 - 3.57498909E-01*T + 6.64957193E+01)}
          {909.0, 1073.16, exp(-4.13090442E-03*T - 3.07044447E+00)}
        argunit = K
        fununit = ohm*m
      alpha_solid_1: Piecewise
        arg = T
        pieces = 
          {0.0, 30.0, 7.35637E-7+2.453566E-9*T^1+1.20482E-11*T^2}
          {30.0, 130.0, 7.707972079E-7+2.098318E-10*T^1+4.628581E-11*T^2+7.569451E-14*T^3-8.713366E-16*T^4}
          {130.0, 293.0, -3.24590075E-7+2.257142E-8*T^1-9.684044E-11*T^2+2.835316E-13*T^3-3.440569E-16*T^4}
          {293.0, 1000.0, 6.794245226E-7+9.501405E-9*T^1-1.271286E-11*T^2+8.584038E-15*T^3-2.241706E-18*T^4}
        argunit = K
        fununit = 1/K
      C_solid_1: Piecewise
        arg = T
        pieces = 
          {1.0, 7.0, -4.832181096E-5+7.68448084E-5*T^1-3.418133862E-5*T^2+2.808307076E-4*T^3-3.12897302E-7*T^4}
          {7.0, 20.0, 0.05251912742-0.03964814884*T^1+0.01004609362*T^2-7.812515424E-4*T^3+3.961556803E-5*T^4}
          {20.0, 50.0, -1.805175785+0.7619034712*T^1-0.08653737912*T^2+0.003735361395*T^3-3.333975631E-5*T^4}
          {50.0, 293.0, -82.940126+2.712235323*T^1+0.01404751222*T^2-7.977691376E-5*T^3+1.079905462E-7*T^4}
          {293.0, 900.0, 62.99772383+3.7706731*T^1-0.00694853616*T^2+5.9532044E-6*T^3-1.914384179E-9*T^4}
          {900.0, 1685.0, 769.4802262+0.1871751311*T^1-3.183959566E-5*T^2}
        argunit = K
        fununit = J/(kg*K)
      sigma_solid_ideally_pure_1: Piecewise
        arg = T
        pieces = 
          {79.0, 364.0, 1/(exp(2.41553243E-14*T^6-4.53060537E-11*T^5+3.33138089E-08*T^4-1.25961454E-05*T^3+2.65814575E-03*T^2-3.13800137E-01*T+1.66255491E+01))}
          {364.0, 584.0, 1/(exp(-7.48706678E-12*T^5+1.66560544E-08*T^4-1.49026159E-05*T^3+6.73181905E-03*T^2-1.54364035E+00*T+1.42728132E+02))}
          {584.0, 909.0, 1/(exp(2.60884402E-10*T^4-7.15630353E-07*T^3+7.39495950E-04*T^2-3.57498909E-01*T+6.64957193E+01))}
          {909.0, 1073.16, 1/(exp(-4.13090442E-03*T-3.07044447E+00))}
        argunit = K
        fununit = S/m
      HC_solid_1: Piecewise
        arg = T
        pieces = 
          {1.0, 7.0, -1.357142742E-6+2.158225189E-6*T^1-9.59999972E-7*T^2+7.887270952E-6*T^3-8.787876952E-9*T^4}
          {7.0, 20.0, 0.001475023955-0.001113538128*T^1+2.821495881E-4*T^2-2.19418374E-5*T^3+1.112623087E-6*T^4}
          {20.0, 50.0, -0.05069927193+0.0213984404*T^1-0.002430445434*T^2+1.049094905E-4*T^3-9.363637192E-7*T^4}
          {50.0, 293.0, -2.329414948+0.07617448976*T^1+3.945314097E-4*T^2-2.240575095E-6*T^3+3.032968211E-9*T^4}
          {293.0, 900.0, 1.391571826+0.1090406047*T^1-2.043950944E-4*T^2+1.786898954E-7*T^3-5.888574152E-11*T^4}
          {900.0, 1685.0, 21.99407257+0.004585166104*T^1-6.452267736E-7*T^2}
        argunit = K
        fununit = J/(mol*K)
      VP_solid_1: Piecewise | arg = T; pieces = {293.0, 1687.0, exp(-28983.23815+18690.8144*log(T)^1-4934.14352*log(T)^2+662.645789*log(T)^3-45.0342817*log(T)^4+1.23403537*log(T)^5)}; argunit = K; fununit = Pa
      rho_solid_1: Piecewise
        arg = T
        pieces = 
          {0.0, 30.0, 2331.510015-7.113612E-5*T^1+3.674386E-6*T^2}
          {30.0, 130.0, 2331.593513-0.005873649*T^1+1.206114E-4*T^2-5.479876E-7*T^3+1.606517E-10*T^4}
          {130.0, 293.0, 2330.438322+0.02130626*T^1-9.544145E-5*T^2+4.607415E-8*T^3+4.840886E-11*T^4}
          {293.0, 1000.0, 2332.565+0.003839515*T^1-5.433308E-5*T^2+4.287211E-8*T^3-1.366545E-11*T^4}
        argunit = K
        fununit = kg/m^3
    ThermalExpansion: ThermalExpansion "热膨胀"
      alphatan = CTE_solid_1(T)
      dL = (dL_solid_1(T)-dL_solid_1(Tempref))/(1+dL_solid_1(Tempref))
      dL_solid_1: Piecewise
        arg = T
        pieces = 
          {0.0, 30.0, -2.157945075E-4}
          {30.0, 130.0, -2.275622662E-4+8.396104E-7*T^1-1.724143E-8*T^2+7.834799E-11*T^3-2.303956E-14*T^4}
          {130.0, 293.0, -5.217231294E-5-3.263667E-6*T^1+1.532991E-8*T^2-1.223001E-11*T^3}
          {293.0, 1000.0, -5.844526349E-4+1.124129E-6*T^1+3.311476E-9*T^2-1.161022E-12*T^3}
        argunit = K
      CTE_solid_1: Piecewise
        arg = T
        pieces = 
          {0.0, 35.0, -1.128708E-10+4.013852E-10*T^1-1.52474E-10*T^2+1.935922E-11*T^3-8.512984E-13*T^4+9.848876E-15*T^5}
          {35.0, 121.0, -4.540190868E-7+5.088778E-8*T^1-1.847617E-9*T^2+2.348401E-11*T^3-1.242463E-13*T^4+2.442997E-16*T^5}
          {121.0, 293.0, 8.511291633E-8-3.514147E-8*T^1+4.332654E-10*T^2-1.449023E-12*T^3+1.630929E-15*T^4}
          {293.0, 1000.0, -2.623074067E-6+3.020773E-8*T^1-5.538848E-11*T^2+4.755059E-14*T^3-1.534596E-17*T^4}
        argunit = K
        fununit = 1/K
  mat4: Common "Teflon (polytetrafluoroethylene) [annealed at 350 °C (623 K),tested at 136 °C (409 K)]" on boundaries 1-3, 5, 7, 10, 11
    LossTangentDF: LossTangentDF "损耗角正切，耗散因子"
      tanDelta = DissF_annealed_at_350C_tested_at_136C_5(freq)
      epsilonPrim = RPT_annealed_at_350C_tested_at_136C_5(freq)
      RPT_annealed_at_350C_tested_at_136C_5: Piecewise
        arg = f
        pieces = 
          {100.0, 1000.0, 1.95800000E+00}
          {1000.0, 10000.0, -4.34294482E-04*log(f) + 1.96100000E+00}
          {10000.0, 100000.0, 8.68588964E-04*log(f) + 1.94900000E+00}
        argunit = 1/s
      DissF_annealed_at_350C_tested_at_136C_5: Piecewise | arg = f; pieces = {100.0, 100000.0, 2.00000000E-04}; argunit = 1/s

Physics
  spf: LaminarFlow "层流" on all domains
    dependent variable u = {u, v, w}
    ShapeProperty.order_fluid = 2
    PhysicalModelProperty.StokesFlowProp = 0
    PhysicalModelProperty.ShallowChannelProperty = 0
    PhysicalModelProperty.EnablePorousMediaDomains = 0
    PhysicalModelProperty.IncludeGravity = 1
    PhysicalModelProperty.UseReducedPressure = 0
    PhysicalModelProperty.Tref = T
    ConsistentStabilization.CrosswindDiffusion = 1
    fp1: FluidProperties "流体属性 1" (default) | minput_temperature = T
    init1: init "初始值 1" (default) | p_init = 1[atm]; CompensateForHydrostaticPressure = 0
    wallbc1: WallBC "壁 1" (default)
    grav1: Gravity "重力 1" | g = {0, -g_const, 0}
    prpc1: PressurePointConstraint "压力点约束 1" on points 7 | p0 = 1[atm]; CompensateForHydrostaticPressure = 0
    vf1: VolumeForce "体积力 1" (disabled) on domains 1
      F = {M*(d(if(isdefined(c),c,0),x)-(d(phipf,x)*(d(phipf,x)*d(if(isdefined(c),c,0),x)+d(phipf,y)*d(if(isdefined(c),c,0),y))/(d(phipf,x)^2+d(phipf,y)^2+1e-12)))*0.5*sqrt(d(phipf,x)^2+d(phipf,y)^2), M*(d(if(isdefined(c),c,0),y)-(d(phipf,y)*(d(phipf,x)*d(if(isdefined(c),c,0),x)+d(phipf,y)*d(if(isdefined(c),c,0),y))/(d(phipf,x)^2+d(phipf,y)^2+1e-12)))*0.5*sqrt(d(phipf,x)^2+d(phipf,y)^2), 0}
    iwbc1: InteriorWallBC "内壁 1" on boundaries 6, 8
  pf: PhaseField "流体相场" on all domains
    dependent variable phipf
    pfm1: PhaseFieldModel "相场模型 1" (default) | epsilon_pf = pf.ep_default; chiOption = userdef
    init1: init "初始值 1(Liquid)" (default) | FluidInDomain = Fluid2phipf
    initfluid2: initFluid2 "初始值 2(Gas)" on domains 2, 3 | FluidInDomain = Fluid1phipf
    ww1: WettedWall "润湿壁 1（Teflon）" (default) | SpecifyContactAngle = SpecifyContactAngleDirectly; thetaw = pi / 2
    ww3: WettedWall "润湿壁 2（顶壁）" on boundaries 7 | thetaw = pi / 2
    iww1: InteriorWettedWall "内部润湿壁 1（衬底）" on boundaries 6, 8 | thetaw = pi / 2
  tds: DilutedSpecies "稀物质传递" on domains 1-3
    dependent variable c
    MassInconsistentStabilization.massIsotropicDiffusion = 0
    cdm1: Fluid "流体 1" (default) | D_c = D * u2 + D_air * u2; minput_temperature = T
    nflx1: NoFlux "无通量 1" (default) | IncludeConvection = 1
    init1: init "初始值 1" (default) | initc = c0
    init2: init "初始值 2" (disabled) on domains 2, 3 | initc = 0
    fd1: FluxDiscontinuity "通量不连续 1（衬底Ga离子络合）" on boundaries 6, 8 | species = 1; N0 = k * c
  dode: DomainODE "域常微分和微分代数方程" on all domains
    dependent variable u2
    ShapeProperty.order = 2
    EquationForm.form = Automatic
    Units.CustomSourceTermUnit = 1
    dode1: DistributedODE "分布式常微分方程 1" (default) | f = u2 - (phipf > 0.2 ); da = 0
    init1: init "初始值 1" (default) | u2 = 0

Multiphysics
  tpf1: TwoPhaseFlowPhaseField "两相流，相场 1" on all domains
    minput_temperature = T
    Fluid1 = dommat
    Fluid2 = dommat
    IncludeSurfaceTension = 1
    IncludeSurfaceTensionGradientEffect = 1
    SurfaceTensionCoefficient = userdef
    sigma = dsigmadc * (c - c0)
    Fluid_physics = spf
    Mathematics_physics = pf

Mesh
  mesh1 "网格 1"
    size: MeshSizeDefault "大小" | hmax = 8; hmin = 1; hcurve = 1e-6; hgrad = 1.5; hauto = 4; custom = on
    ftri2: FreeTri "自由三角形网格 1" on remaining entities
      size1: Size "大小 1" on boundaries 6, 8 | hmax = 0.5; custom = on
      dis1: Distribution "分布 1" on boundaries 6, 8 | numelem = 15; equidistant = on
      size2: Size "大小 2" on boundaries 9 | hmax = 2; custom = on
      dis2: Distribution "分布 2" on boundaries 9 | numelem = 100; equidistant = on
      size4: Size "大小 3" on boundaries 4 | hmax = 2; custom = on
      dis3: Distribution "分布 3" on boundaries 4 | numelem = 10; equidistant = on
      size3: Size "大小 4" on entire geometry | hmax = 5; custom = on

Studies
  std1 "研究 1"
    phasei: PhaseInitialization "相初始化" | ftplistmethod = manual; solve for = {pf, tds}
    time: Transient "瞬态"
      tlist = range(0,1,20)
      initialtime = 0
      usertol = on
      ftplistmethod = manual
      useinitsol = on
      initstudy = std1
      usesol = on
      notsolmethod = sol
      notstudy = std1

Solver configurations
  sol1 "解 1" (study std1)
    v1: Variables "因变量 1"
    s1: Stationary "稳态求解器 1"
      fc1: FullyCoupled "全耦合 1" | maxiter = 50
      d1: Direct "直接，界面距离 (pf)"
    su1: StoreSolution "解存储 1"
    v2: Variables "因变量 2"
    t1: Time "瞬态求解器 1"
      tlist = range(0,1,20)
      tout = tstepsclosest
      maxstepbdf = 2
      maxstepexpressionbdf = 2
      maxorder = 2
      eventtol = 0.05
      initialstepbdf = 0.001
      se1: Segregated "分离 1" | segterm = itertol; segiter = 60; maxsegiter = 60; segtermonres = auto
        ss1: SegregatedStep "浓度 c"
        ss2: SegregatedStep "速度 u，压力 p"
        ss3: SegregatedStep "相场变量"
        dode1: SegregatedStep "分离步骤 1"
      d1: Direct "Direct (已合并)"
      d2: Direct "直接，流体流动变量 (spf)"
      d3: Direct "直接，相场变量 (pf)"
  sol2 "解存储 1" (study std1)

Datasets
  dset1: Solution | solution = sol1
  dset2: Solution | solution = sol2

Derived values
  av2: AvVolume "体积平均 2" | table = tbl5; expr = 1; unit = 1

Tables
  tbl4: Table "表格 4"
    // 表面平均值 1
    Time (s) | 速度场，y 分量 (m/s)
    0 | 2.27279e-05
    1 | 2.55235e-06
    2 | -6.83745e-05
    3 | -5.68999e-05
    4 | -2.41547e-05
    5 | 1.72246e-05
    6 | -4.57257e-05
    7 | -5.75892e-05
    8 | 1.32927e-05
    9 | -0.000186385
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
Plots
  pg1: PlotGroup2D "速度 (spf)" | data = dset1
    surf1: Surface "表面" | data = dset1; expr = v
  pg3: PlotGroup2D "流体 1 的体积分数 (pf)" | data = dset1
    surf1: Surface "表面 1" | expr = pf.Vf2
    con1: Contour "等值线 1" | expr = pf.Vf1; levelmethod = levels; levels = 0.5
  pg4: PlotGroup2D "浓度 (tds)" | data = dset1
    surf1: Surface "表面 1" | expr = c
    arws1: ArrowSurface "面上箭头 1" | expr = {tds.cflux_cx, tds.cflux_cy}; descr = 对流通量; xnumber = 10; ynumber = 10
      sel1: Selection "选择 1" on domains 1
  pg5: PlotGroup2D "相场变量(phipf)" | data = dset1
    con1: Contour "等值线 1" | expr = phipf; descr = 相场变量
  pg9: PlotGroup2D "表面张力 x分量" | data = dset1
    surf1: Surface "表面 1" | expr = tpf1.Fstx
  pg10: PlotGroup2D "表面张力 y分量" | data = dset1
    surf1: Surface "表面 1" | expr = tpf1.Fsty
  pg11: PlotGroup2D "因变量 u2" | data = dset1
    surf1: Surface "表面 1" | expr = u2

Exports
  anim2: Animation "动态演化" | target = player; framesel = all; maxframes = 101; frametime = 1